# canola grain production | no tillage | Cutoff, U - BR -South

Dataset: ILCD process, Unit process, black box
Geography: BR-Southern grid
Reference year: 2019
Valid until: 2020
Classification: A:Agriculture, forestry and fishing / 01:Crop and animal production, hunting and related service activities / 011:Growing of non-perennial crops / 0111:Growing of cereals (except rice), leguminous crops and oil seeds
LCI method principle: Other
Project: Life Cycle Inventory of canola production and bioproducts in the South Region of Brazil - a contribution to SCVI Brasil (CNPq-MCTIC)
Generated by: Alexandre Nunes Cardoso and Team
Review: Not reviewed by Vinícius Gonçalves Maciel
Amounts: no units in this file; such an amount is in the reference unit of its flow, which a separate flow dataset defines
copyright: false

## General comment
This dataset represents the production of 1 kg of canola grain in average with 16% moisture content, produced in the South region of Brazil, mainly Rio Grande do Sul and Paraná states. Accoding to Conab (2021), this region is reponsable for all the canola grain produced in Brazil. The average annual yield conidered for the calculations is 1371 kg/ha (CONAB, 2019). This activity represents the production of canola grain in a no tillage and non-irrigated cropping system, as a second crop, mainly after soybean. Land occupation and liming are shared with the previous main crop, and related to the period of time that canola use the land for production. The total amount of mineral fertilizers (N-P-K) and pesticides pesticides applied are in accodance to a regional survey by De Mori et al. (2019) and Masaro Junior et al. (2019). The dataset includes lime an gypisum, mineral fertilisers, and pesticides inputs.
Agricultural operations are also included: limestone and gypsum application, by spreader; application of plant protection product, by field sprayer; planting with starter fertiliser, by no till planter; fertilising, by broadcaster; and combine harvesting.
Direct field emissions of greenhouse gas and heavy metals, among other emissions are included, considering for the calculations the following references: Canals, (2003); IPCC, (2006); Nemecek and Schnetzer, (2012), Nemecek et al., (2015). The activity ends after harvest at the farm gate.

Main references as follow:
COMPANHIA NACIONAL DE ABASTECIMENTO – CONAB. Acompanhamento da safra brasileira grãos, v. 7 – safra 2019/20 – Primeiro levantamento, Brasília, 2019. Disponível em: https://www.conab.gov.br/info-agro/safras/graos. Acesso em: 10 out. 2019
DE MORI, C.; FERREIRA, P. E. P.; MARSARO JUNIOR, A. L.; TOMM, G. O.; COSTAMILAN, L. M.; VARGAS, L.; SILVA, F. A. N.; PEREIRA, P. R. V. da S. Levantamento de tecnologias empregadas no cultivo de canola pelos produtores do Rio Grande do Sul, Paraná e Minas Gerais. Passo Fundo: Embrapa Trigo, 2019. 56 p. (Embrapa Trigo. Documentos online, 181). Disponível em: https://ainfo.cnptia.embrapa.br/digital/bitstream/item/205197/1/ID44766-2019DO181.pdf . Acesso em: 14 out. 2019.
FOLEGATTI-MATSUURA, M. I. S.; PICOLI, J. F. Life Cycle Inventories of Agriculture, Forestry and Animal Husbandry – Brazil. 2018. Zürich, Switzerland: p. 1-143.
MARSARO JUNIOR, A. L.; DE MORI, C.; FERREIRA, P. E. P.; TOMM, G. O.; PICANÇO, M. C.; PEREIRA, P. R. V. da S. Caracterização do manejo de insetos-praga da canola adotado por produtores no Rio Grande do Sul e no Paraná. Passo Fundo, RS: Embrapa Trigo, 2019. (Embrapa Trigo. Documentos, 182) Disponível em: https://www.infoteca.cnptia.embrapa.br/infoteca/bitstream/doc/1120082/1/Doc182Albertocompletojun19.pdf. Acesso em: 14 out. 2019.
CANALS, L. M. Contributions to LCA methodology for agricultural systems: site dependency and soil degradation impact assessment. 2003. Tese (Doutorado) - Unitat de Química Física, Departament de Química, Universitat Autònoma de Barcelona, Barcelona, Espanha, 2003.
CASTRO, A. M. C.; BOARETTO, A. E. Teores e acúmulo de nutrientes em função da população de plantas de canola. Scientia Agraria, Volume 5:1-2, 2004, p. 95-101.
NEMECEK, T., BENGOA, X., LANSCHE J., MOURON, P., RIEDENER, E., ROSSI, V., HUMBERT, S. Methodological Guidelines for the Life Cycle Inventory of Agricultural Products. Version 3.0, World Food LCA Database (WFLDB), Quantis and Agroscope, Lausanne and Zurich, Switzerland, 2015.

## Geography
The inventory is modelled for the south region of Brazil, mainly Rio Grande do Sul and Parana states.

## Time period
Time period during most of the data were collected for this dataset.

## Technology and included processes
Cultivation of canola grains as a second harvest in no till cropping system (e.g. soybean followed by canola).

## Reference product
- canola grain: 1
  1 kg of canola produced. Biomass residues left on the field.

## Inputs
- pesticide, unspecified: 2.18813e-7
  Most aplied inseticide for seed treatment of canola according to Marsaro Junior et al. (2019): Fipronil.
  Although not include at Agrofit (2012), with no specific recomendation for canola, calculation was made based on recomendation for forage seeds, wich have similar weigh, considering:
  Active ingredient in commercial product:250 g/L
  Dose: 10 g/100 kg of seeds.
  https://www.nortox.com.br/wp-content/uploads/2017/06/BULA-Fipronil-Nortox_VER-04-20.03.2019.pdf
  Assuming 3 kg of seeds/ha (De Mori et al. (2019) and productivity of 1371 kg/ha.
  (2.18813E-7 kg/kg canola)
- rape seed, for sowing: 0.0021
  It was assumed a global process for seed production for sowing.
  Considering an average of 3 kg/ha for sowing according to De Mori et al., 2019), and productivity of 1371 kg/ha (Conab, 2019).
- gypsum, mineral: 0.012798
  Amount for typical system according to "Levantamento de tecnologias empregadas no cultivo de canola pelos produtores do Rio Grande do Sul, Paraná e Minas Gerais" - De Mori et al. (2019).
  It is asssumed that application of 0.1167 kg /kg canola occurs every 3 years (amount of gypsum/3), andand 32.9% of the amount is alocated to canola, considering the rate of land occupation by canola in the croping system.
- inorganic potassium fertiliser, as K2O: 0.0278993
  Amount for typical system according to "Levantamento de tecnologias empregadas no cultivo de canola pelos produtores do Rio Grande do Sul, Paraná e Minas Gerais" - De Mori et al. (2019).
- urea: 0.088003
  Amount for typical system according to "Levantamento de tecnologias empregadas no cultivo de canola pelos produtores do Rio Grande do Sul, Paraná e Minas Gerais" - De Mori et al. (2019).
  The exchange has been updated from 'urea, as N' into 'urea' and therefore its amount has been scaled (multiplied) from 0.0404814 kg by 2.1438 kg of 'urea' per kg of 'urea, as N'. Original comment of the exchange is: Urea as Nitrogen fertiliser.
- Water, unspecified natural origin: 0.0005835
  Water used to dilute pesticides in a rate of 200 liters/ha/ application/year. It was considered at least four aplications per year.
  (800 l/1371 kg)
- pesticide, unspecified: 7e-5
  One of the most aplied- post-emergent herbicide to canola according to Marsaro Junior et al. (2019): Clethodim
  Amounts caculated according to Agrofit: Sistema de Agrotóxicos
  Fitossanitários
  Active ingredient: 240 g/L Dose: 0.40 L /ha(file:///C:/Users/Usuario/Downloads/F396571064_Bula_Agrofit_Cletodim%20CCAB%20240%20EC_05.08.2021.pdf)
  (7.00E-5 kg/kg canola).
- pesticide, unspecified: 1.4e-5
  One of the most applied inseticides to canola according to Marsaro Junior et al. (2019): Diflubenzuron
  Amounts caculated conisidering;
  Active ingredient in commercial product: 240 g/L
  Dose 0.08 L/ (19, 2 g/ha)
  https://s3.sa-east-1.amazonaws.com/bd-sp.canaldapeca.com.br/Terraverde/Bulas/09-04-2020/100476.PDF
  (1.4000E-5 kg/kg canola)
- application of plant protection product, by field sprayer: 29.2
  Agricultural operation according to Chagas et al.(2018) and productivity 1371kg/ha (Conab, 2019).
  It was considered at least four aplications/ha/year.
- fertilising, by broadcaster: 7.3
  Agricultural operation according to Chagas et al.(2018), and productivity of 1371 kg/ha (Conab, 2019).
- Occupation, annual crop, non-irrigated, intensive: 2.407
  Land occupation is estimated to be 120 days considering a cropping system where canola occupies the land as a second crop, resulting in application of a 0.33 index for the calculation.
- Transformation, to annual crop, non-irrigated: 7.294
  Amount for typical system according to More et al. (2019) and canola productivity of 1371 kg/ha (Conab, 2019).
- planting with starter fertiliser, by no till planter: 7.29
  (same comment as for fertilising, by broadcaster)
- inorganic phosphorus fertiliser, as P2O5: 0.03246
  (same comment as for inorganic potassium fertiliser, as K2O)
- glyphosate: 0.000700218
  Applied as pre-emergent to control weeds and possible regrowth of soybean as the first crop.
  Assuming dose 2.0 L/ha as used by (Bandeira et al.; 2013)
  Ingredient ativo: 480g/L, according to Agrolink.com.br/agrolinkfito/produto/glifostao-atanor_5458.html, acessed in 06-2021.
  Glifosato (7.00218E10-4 kg/kg canola)
- Carbon dioxide, in air: 1.26004
  CO2 absorbed during photosyntesis. See "3.1 CO2 from the Atmosphere" in Nemececk & Schnetzer (2011).
  Assuming yield 1371 kg/ha; 3 kg/ of seeds/ ha for sowing.
  For the sake of comparance, rapeseed in temperate countries at ecoinvent v. 3.7.1 varies from 1.58 to 1.90.
- Transformation, from annual crop, non-irrigated: 7.294
  (same comment as for Transformation, to annual crop, non-irrigated)
- lime: 0.17597
  Amount for typical system according to "Levantamento de tecnologias empregadas no cultivo de canola pelos produtores do Rio Grande do Sul, Paraná e Minas Gerais" - De Mori et al. (2019).
  The sum of calcitic and dolomitic lime amounts considered as input to the system is 1.604668 kg/kg of canola, equivalent to 2,2 ton/ha.
  It is asssumed that application occur every 3 years (amount of lime/3), and 32.9% of the amount is alocated to canola, considering the rate of land occupation by canola in the croping system.
- pesticide, unspecified: 5.47e-6
  One of the most aplied inseticides to canola according to Marsaro Junior et al. (2019) - Lambda-cialotrin
  There is no specific entrance in the data base.
  Calculation considering:
  Active ingredient 250 g/L; dose 0.03 l/ha = 7.5 g/ha
  https://s3.sa-east-1.amazonaws.com/bd-sp.canaldapeca.com.br/Terraverde/Bulas/09-04-2020/100476.PDF
  (5.47E-6 kg/kg canola)
- packaging, for pesticides: 0.001218
  According to the approach of Folegatti and Picoli (2018) for grains ICVs BR, the total amount of active substance/s needed for packing is estimated to be the double of the pesticides. Total amount of active substance/s of pesticide' is calculated to be 0.00061 kg/kg of canola). Therefore, 0.00122 kg of packaging material is estimated to be needed.
- packaging, for fertilisers: 0.4348
  According to the approach of Folegatti and Picoli (2018) for grains ICVs BR, the total amount of active substance/s needed for packing is estimated to be the double of the fertilizer. Total amount of active substance/s of fertilisers' is calculated to be 0.2174 kg/kg of canola (lime not included). Therefore, 0.4348 kg of packaging material is estimated to be needed.
- combine harvesting: 7.3
  Agricultural operation according to Chagas et al.(2018), and productivity 1371kg/ha (Conab, 2019)
- limestone and gypsum application, by spreader: 0.802
  Agricultural operation according to Chagas et al.(2018), and productivity 1371kg/ha (Conab, 2019).
  It is asssumed that application occur every 3 years (amount of lime/3), and 1/3 of of the amount is alocated to canola, considering a cropping system where canola occupies the ground in average for four months.
- Energy, gross calorific value, in biomass: 24.0002
  Calorific value based on rapeseed dataset at Ecoinvent v.3.7 database - rape seed production | rape seed | Cutoff, U - RoW.

## Outputs
- Cadmium: 6.48427e-7
  Emissions of heavy metals to soil are calculated as recommended by Canals (2003), and conisdering concentrations in mineral fertilisers and gypsumaccording to Sugawara (2012).
  Although part of applied heavy can be exported through the harvested grains, for this study this amount is not be considered.
- Copper, ion: 7.11693e-10
  Emissions of heavy metals to surface water were calculated as according to Canals (2003), considering an emission factor to water of 0.0001 regarding emission to soil.
  Concentrations of heavy metals in mineral fertilisers, llime and gypsum are according to Sugawara (2012).
  Although part of applied heavy can be exported through the harvested grains, for this study this amount is not be considered.
- Chromium: 8.11927e-6
  Emissions of heavy metals to soil are calculated as recommended by Canals (2003), and conisdering concentrations in mineral fertilisers, lime and gypsum are according to Sugawara (2012).
  Although part of applied heavy can be exported through the harvested grains, for this study this amount is not be considered.
- Zinc: 3.41969e-5
  Emissions of heavy metals to soil r were calculated as recommended by Canals (2003), and considering concentrations in mineral fertilisers, lime and gypsum according to Sugawara (2012).
  Although part of applied heavy can be exported through the harvested grains, for this study this amount is not be considered.
- Copper: 7.11693e-6
  Emissions of heavy metals to soil are calculated as recommended by Canals (2003), and conisdering concentrations in mineral fertilisers, lime and gypsum are according to Sugawara (2012).
  Although part of applied heavy can be exported through the harvested grains, for this study this amount is not be considered
- Zinc, ion: 3.41969e-9
  Emissions of heavy metals to surface water were calculated as according to Canals (2003), considering an emission factor to water of 0.0001 regarding emission to soil.
  Concentrations of heavy metals in mineral fertilisers, lime and gypsum are according to Sugawara (2012).
  Although part of applied heavy can be exported through the harvested grains, for this study this amount is not be considered.
- Phosphorus: 3.4e-5
  Calculation considering:
  Soil eroded: 130 kg/ha, according to Guth (2010), for canola experimental crop.
  Average soil surface P contend: 0.00095 (from Folegatti-Matsura e Picolo (2018) for grain brazilian inventories)
  Due to phosphorus low mobility in Brazilian soils, its emissions through leaching and run-off were disregarded (Novais & Smyth, 1999). Only P emission by water erosion through surface water was considered, as in "2.3.3 Phorsphorous Emissions Through Water Erosion to Surface Water" Nemecek and Schnetzer (2011).
- Lead: 1.56115e-5
  Emissions of heavy metals to soil calculated as recommended by Canals (2003), and conisdering concentrations in mineral fertilisers and gypsum according to Sugawara (2012).
  Although part of applied heavy metals can be exported through the harvested grains, for this study this amount is not be considered.
- Chromium, ion: 8.11927e-10
  (same comment as for Zinc, ion)
- Lead: 1.56115e-9
  Emissions of heavy metals to surface water were calculated as according to Canals (2003), considering an emission factor to water of 0.0001 regarding emission to soil.
  Concentrations of heavy metals in mineral fertilisers and gypsum are according to Sugawara (2012).
  Although part of applied heavy can be exported through the harvested grains, for this study this amount is not be considered.
- Dinitrogen monoxide: 0.00245957
  Considering total N fertilizer aplication of 55.5 kg/ha/year, as recomended by De Mori et al. (2019), and nitrogen contained in the crop residues" Ncr = 120 kg N/ha.
  Emissions of N2O to the air. See "2.4 EMISSIONS OF N2O TO THE AIR" in Nemecek & Schnetzer (2011).
- Cadmium, ion: 6.48427e-11
  (same comment as for Lead)
- Nitrate: 0.133334
  Considering urea as a N fertilizer, as recomended by De Mori et al. (2019)
  See "2.2.2 The SQCB-NO3 model" in Nemececk & Schnetzer (2011), as "SALCA-NO3 model" has "Geographic scope of application: Europe".
  Considering: U= estimated as 172 Kg N/ha for Nitrogen uptake estimated form Castro e Boareto (2004)for canola; Norg in soil =10t/ha or soils at Rio Grande do Suk state (Folegatti-Matsura e Picoli (2018); root depth=0.30 m according to Rocha et al. (2017) for canola; preciptation of 1788 mm/year for Rio Grande do Sul state (Folegatti-Matsura e Picoli; 2018)
- Glyphosate: 0.000700218
  "All pesticides applied for crop production were assumed to end up as emissions to the soil. The amounts of pesticides used as inputs were thus simultaneously calculated as outputs (emissions to agricultural soil)", as recomended by Nemecek & Schnetzer (2011), "2.9 EMISSIONS OF PESTICIDES TO AGRICULTURAL SOIL" (page 21).
- Nickel: 8.15886e-6
  Emissions of heavy metals to soil were calculated as recommended by Canals (2003), and considering concentrations in mineral fertilisers and gypsum according to Sugawara (2012).
  Although part of applied heavy can be exported through the harvested grains, for this study this amount is not be considered.
- Ammonia: 0.0073734
  Considering urea as a N fertilizer aplication, as recomended by Mori et al. (2019).
  NH3 emissions from applied mineral fertilisers are calculated according to Nemecek and Schnetzer (2012), coonsidering emmission factor for urea 0.15 for soils with pH<=7 (brazilian conditions).
- Nitrogen oxides: 0.000517
  Considering productivity o 1371 kg of canola/ha
  Emissions of NOx to the air. See "2.5 EMISSIONS OF NOX TO THE AIR" in Nemecek & Schnetzer (2011)=0.21* kg of N2O emmited.
- Clethodim: 7e-5
  (same comment as for Glyphosate)
- Fipronil: 2.18813e-7
  (same comment as for Glyphosate)
- Water: 0.00058
  It was considered emmission of all the water used for pesticides dilution (800 liters).
- Diflubenzuron: 1.4e-5
  (same comment as for Glyphosate)
- Nickel, ion: 8.15886e-10
  (same comment as for Lead)
- Carbon dioxide, fossil: 0.815253
  Emissions of CO2 to air from limestone and urea application based on IPCC (2006). Considering 120.5 kg of urea/ha (emission fator 0.2); 1670 kg/ha dolomitic lime (emission fator 0.13); 530 kg calcitic lime (emission fator 0.12).
- Lambda-cyhalothrin: 5.47e-6
  (same comment as for Glyphosate)

## Sampling procedure
The main source of data for agricultural inputs and operations are projects conducted by Embrapa Trigo (CNPT), informed in a survey about canola crop technologies by De Mori et al. (2019). Data are also provided by relevant experts related to agricultural sector of canola in Brazil.
Emissions from the agricultural process are estimated according to Nemecek and Schnetzer (2011) and Canals (2003).
Brazilian canola grain production is concentrated in the states of Paraná and Rio Grande do Sul representing almost 100% of the total production in BR, according to Conab (2021).
The following sources were considered and converted, when possible:
COMPANHIA NACIONAL DE ABASTECIMENTO – CONAB. Acompanhamento da safra brasileira grãos, v. 7 – safra 2019/20 – Primeiro levantamento, Brasília, 2019. Disponível em: https://www.conab.gov.br/info-agro/safras/graos. Acesso em: 10 out. 2019
DE MORI, C.; FERREIRA, P. E. P.; MARSARO JUNIOR, A. L.; TOMM, G. O.; COSTAMILAN, L. M.; VARGAS, L.; SILVA, F. A. N.; PEREIRA, P. R. V. da S. Levantamento de tecnologias empregadas no cultivo de canola pelos produtores do Rio Grande do Sul, Paraná e Minas Gerais. Passo Fundo: Embrapa Trigo, 2019. 56 p. (Embrapa Trigo. Documentos online, 181). Disponível em: https://ainfo.cnptia.embrapa.br/digital/bitstream/item/205197/1/ID44766-2019DO181.pdf . Acesso em: 14 out. 2019.
FOLEGATTI-MATSUURA, M. I. S.; PICOLI, J. F. Life Cycle Inventories of Agriculture, Forestry and Animal Husbandry – Brazil. 2018. Zürich, Switzerland: p. 1-143.
MARSARO JUNIOR, A. L.; DE MORI, C.; FERREIRA, P. E. P.; TOMM, G. O.; PICANÇO, M. C.; PEREIRA, P. R. V. da S. Caracterização do manejo de insetos-praga da canola adotado por produtores no Rio Grande do Sul e no Paraná. Passo Fundo, RS: Embrapa Trigo, 2019. (Embrapa Trigo. Documentos, 182) Disponível em: https://www.infoteca.cnptia.embrapa.br/infoteca/bitstream/doc/1120082/1/Doc182Albertocompletojun19.pdf. Acesso em: 14 out. 2019.
CANALS, L. M. Contributions to LCA methodology for agricultural systems: site dependency and soil degradation impact assessment. 2003. Tese (Doutorado) - Unitat de Química Física, Departament de Química, Universitat Autònoma de Barcelona, Barcelona, Espanha, 2003.
NEMECEK, T., BENGOA, X., LANSCHE J., MOURON, P., RIEDENER, E., ROSSI, V., HUMBERT, S. Methodological Guidelines for the Life Cycle Inventory of Agricultural Products. Version 3.0, World Food LCA Database (WFLDB), Quantis and Agroscope, Lausanne and Zurich, Switzerland, 2015.

## Data collection period
Data was collected from 07/2019 to 07/2020

## Review details
Foi realizada avaliação e validação prévia por especialistas da equipe técnica que trabalha com o cultura da canola na região sul (Embrapa trigo )e com o representantes da Associação Brasileira dos produtores de canola - Abrascanola. Também foram acessados com inventários brasileiros para produção de outros grãos na região sul do Brazil, recentemente publicados e incorporados na BD do Ecoinvent e no SICV.
